*INCLUDE, INPUT=allinone.inp
*INCLUDE, INPUT=add_material.inp
*INCLUDE, INPUT=add_support.inp
*INCLUDE, INPUT=add_contact.inp
*STEP,NLGEOM
*STATIC
0.1,3
  *NODE FILE
U,
  *EL FILE
S,
*NODE PRINT,NSET=HUB
RF
*NODE PRINT,NSET=BOTTOM
RF
*CONTACT OUTPUT
CDIS,CSTR
*END STEP
